#include "RangeOfMotionLimits_template.any"

#include "<ANYBODY_PATH_INSTALLDIR>/AMMR/Application/libdef.any"


Main = {

  //#path BM_MANNEQUIN_FILE "Mannequin.any"
  // Include the HumanModel from the repository
  #define BM_ARM_RIGHT ON
  #define BM_ARM_LEFT ON
  #define BM_TRUNK_NECK ON
  #define BM_LEG_RIGHT ON
  #define BM_LEG_LEFT ON

  #define BM_LEG_MODEL _LEG_MODEL_TLEM1_

  #include "<ANYBODY_PATH_BODY>/HumanModel.any"

  AnyBodyStudy Study = {
     AnyFolder &model = .HumanModel.BodyModelWithDefaultDrivers;
     Gravity = {0.0, -9.81, 0};

     RangeOfMotionLimits JointLimits(
              ARM_RIGHT = BM_ARM_RIGHT,
              ARM_LEFT = BM_ARM_LEFT,
              LEG_RIGHT = BM_LEG_RIGHT,
              LEG_LEFT = BM_LEG_LEFT,
              TRUNK_NECK = BM_TRUNK_NECK
      )= {};

  };


};// Main
